*Heading
** Job name: Job-PlateWithHole-built-in Model name: Model-1
** Generated by: Abaqus/CAE 2020
*Preprint, echo=NO, model=NO, history=NO, contact=NO
**
** PARTS
**
*Part, name=Composite_Plies
*Node
      1,         -10.,          10.,           5.
      2,         -10.,          10.,           0.
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*Element, type=C3D8
  1,  70,  80, 242, 161,   1,   2,  17,  34
  2, 161, 242, 243, 162,  34,  17,  18,  33
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*Nset, nset=Ply-1, generate
    1,  1160,     1
*Elset, elset=Ply-1, generate
   1,  520,    1
*Nset, nset=Set_X0
  3,  4,  6,  7, 53, 54
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*Elset, elset=Set_X0, generate
  10,  100,   10
*Nset, nset=Set_X1
  13,  14,  15,  16, 107, 108
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*Elset, elset=Set_X1, generate
 191,  200,    1
*Nset, nset=Set_Y0
   5,   6,   7,   8,  10,  11
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*Elset, elset=Set_Y0
  91,  92,  93,  94,  95,  96
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*Nset, nset=Set_Y1
   1,   2,   3,   4,   9,  12
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*Elset, elset=Set_Y1
   1,   2,   3,   4,   5,   6
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*Nset, nset=Set-mesh-line-group1
   1,   2,   3,   4,   5,   6
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*Elset, elset=Set-mesh-line-group1
   1,  10,  11,  20,  21,  30
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*Elset, elset=Set-Vol, generate
   1,  520,    1
*Elset, elset=_Surf_X0_S5, internal, generate
  10,  100,   10
*Surface, type=ELEMENT, name=Surf_X0
_Surf_X0_S5, S5
*Elset, elset=_Surf_X1_S1, internal, generate
 191,  200,    1
*Surface, type=ELEMENT, name=Surf_X1
_Surf_X1_S1, S1
*Elset, elset=_Surf_Y0_S4, internal, generate
 110,  200,   10
*Elset, elset=_Surf_Y0_S1, internal, generate
  91,  100,    1
*Elset, elset=_Surf_Y0_S6, internal, generate
 361,  397,    4
*Surface, type=ELEMENT, name=Surf_Y0
_Surf_Y0_S4, S4
_Surf_Y0_S1, S1
_Surf_Y0_S6, S6
*Elset, elset=_Surf_Y1_S6, internal, generate
 101,  191,   10
*Elset, elset=_Surf_Y1_S4, internal, generate
 244,  280,    4
*Elset, elset=_Surf_Y1_S2, internal, generate
  1,  10,   1
*Surface, type=ELEMENT, name=Surf_Y1
_Surf_Y1_S6, S6
_Surf_Y1_S4, S4
_Surf_Y1_S2, S2
*Elset, elset=_Surf_Z0_S3, internal
 101, 102, 103, 104, 105, 106
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*Elset, elset=_Surf_Z0_S2, internal
 281, 282, 283, 284, 285, 286
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*Elset, elset=_Surf_Z0_S4, internal
   1,   2,   3,   4,   5,   6
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*Surface, type=ELEMENT, name=Surf_Z0
_Surf_Z0_S3, S3
_Surf_Z0_S2, S2
_Surf_Z0_S4, S4
*Elset, elset=_Surf_Z1_S5, internal
 101, 102, 103, 104, 105, 106
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*Elset, elset=_Surf_Z1_S6, internal
   1,   2,   3,   4,   5,   6
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*Elset, elset=_Surf_Z1_S1, internal
 281, 282, 283, 284, 285, 286
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*Surface, type=ELEMENT, name=Surf_Z1
_Surf_Z1_S5, S5
_Surf_Z1_S6, S6
_Surf_Z1_S1, S1
*Orientation, name=Ori-2
1., 0., 0., 0., 1., 0.
3, 0.
** Section: Section-1
*Solid Section, elset=Set-Vol, orientation=Ori-2, material=Material-1
,
*End Part
**
**
** ASSEMBLY
**
*Assembly, name=Assembly
**
*Instance, name=Composite_Plies-1, part=Composite_Plies
*End Instance
**
*End Assembly
**
** MATERIALS
**
*Material, name=Material-1
*Elastic
210000., 0.3
** ----------------------------------------------------------------
**
** STEP: Step-1
**
*Step, name=Step-1, nlgeom=NO
*Static
1., 1., 1e-05, 1.
**
** BOUNDARY CONDITIONS
**
** Name: BC-1 Type: Displacement/Rotation
*Boundary
Composite_Plies-1.Set_X0, 1,1
Composite_Plies-1.Set_X0, 2,2
Composite_Plies-1.Set_X0, 3,3
** Name: BC-2 Type: Displacement/Rotation
*Boundary
Composite_Plies-1.Set_X1, 1, 1, 2.
**
** OUTPUT REQUESTS
**
*Restart, write, frequency=0
**
** FIELD OUTPUT: F-Output-1
**
*Output, field, variable=PRESELECT
**
** HISTORY OUTPUT: H-Output-1
**
*Output, history, variable=PRESELECT
*End Step
