*Heading
** Job name: Job-PlateWithHole-built-in Model name: Model-1
** Generated by: Abaqus/CAE 2020
*Preprint, echo=NO, model=NO, history=NO, contact=NO
**
** PARTS
**
*Part, name=Composite_Plies
*Node
      1,         -10.,          10.,           5.
      2,         -10.,          10.,           0.
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*USER ELEMENT, NODES=8, TYPE=U1, PROPERTIES=2, Var=200, COORDINATES=3
1, 2, 3
*Element, type=U1
  1,  70,  80, 242, 161,   1,   2,  17,  34
  2, 161, 242, 243, 162,  34,  17,  18,  33
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*Element, type=C3D8
10001,  70,  80, 242, 161,   1,   2,  17,  34
10002, 161, 242, 243, 162,  34,  17,  18,  33
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*Nset, nset=Ply-1, generate
    1,  1160,     1
*Elset, elset=Ply-1, generate
   1,  520,    1
*Nset, nset=Set_X0
  3,  4,  6,  7, 53, 54
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*Elset, elset=Set_X0, generate
  10,  100,   10
*Nset, nset=Set_X1
  13,  14,  15,  16, 107, 108
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*Elset, elset=Set_X1, generate
 191,  200,    1
*Nset, nset=Set_Y0
   5,   6,   7,   8,  10,  11
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*Elset, elset=Set_Y0
  91,  92,  93,  94,  95,  96
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*Nset, nset=Set_Y1
   1,   2,   3,   4,   9,  12
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*Elset, elset=Set_Y1
   1,   2,   3,   4,   5,   6
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*Nset, nset=Set-mesh-line-group1
   1,   2,   3,   4,   5,   6
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*Elset, elset=Set-mesh-line-group1
   1,  10,  11,  20,  21,  30
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*Elset, elset=Set-Vol, generate
   1,  520,    1
*Elset, elset=Set-Dummy, generate
   10001,  10520,    1
** Section: Section-1
*UEL PROPERTY, ELSET=Set-Vol
210000., 0.3
** Section: Section-2
*Solid Section, Elset=Set-Dummy, Material=Dummymat
****Hourglass Stiffness
****0.0025, , 0., 0.
*End Part
**
*Material, Name=Dummymat
*User Material, constants=2
1.0e-11, 0.3
*Depvar
12
**
** ASSEMBLY
**
*Assembly, name=Assembly
**
*Instance, name=Composite_Plies-1, part=Composite_Plies
*End Instance
**
*End Assembly
**
** ----------------------------------------------------------------
**
** STEP: Step-1
**
*Step, name=Step-1, nlgeom=NO
*Static
1., 1., 1e-05, 1.
**
** BOUNDARY CONDITIONS
**
** Name: BC-1 Type: Displacement/Rotation
*Boundary
Composite_Plies-1.Set_X0, 1,1
Composite_Plies-1.Set_X0, 2,2
Composite_Plies-1.Set_X0, 3,3
** Name: BC-2 Type: Displacement/Rotation
*Boundary
Composite_Plies-1.Set_X1, 1, 1, 2.
**
** OUTPUT REQUESTS
**
*Restart, write, frequency=0
**
** FIELD OUTPUT: F-Output-1
**
*Output, field, variable=PRESELECT
**
** FIELD OUTPUT: F-Output-2
**
*Output, field
*Element Output, elset=Composite_Plies-1.Set-Dummy, directions=YES
SDV,
** HISTORY OUTPUT: H-Output-1
**
*Output, history, variable=PRESELECT
*End Step
