*Heading
** Job name: Job-1 Model name: Model-1
** Generated by: Abaqus/CAE 2020
*Preprint, echo=NO, model=NO, history=NO, contact=NO
**
** PARTS
**
*Part, name=Part-1
*Node
      1,          10.,          10.,          10.
      2,          10.,           9.,          10.
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*USER ELEMENT, NODES=8, TYPE=U1008, IPROPERTIES=3, PROPERTIES=8, COORDINATES=3, VARIABLES=1296
1, 2, 3
*ELEMENT, TYPE=U1008
   1,  122,  123,  134,  133,    1,    2,   13,   12
   2,  123,  124,  135,  134,    2,    3,   14,   13
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*Element, type=C3D8
1001,  122,  123,  134,  133,    1,    2,   13,   12
1002,  123,  124,  135,  134,    2,    3,   14,   13
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*Nset, nset=Set-1, generate
    1,  1331,     1
*Elset, elset=SBFEM_UEL, generate
    1,  1000,     1
*Elset, elset=dummy, generate
 1001,  2000,  1
*Nset, nset=FIXED
  111,  112,  113,  114,  115,  116
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*Nset, nset=FORCE
    1,    2,    3,    4,    5,    6
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** Section: Section-1
*UEL PROPERTY, ELSET=SBFEM_UEL
1e10,	0.250000,	2000,	0, 0, 0, 0, 0
*Solid Section, elset=dummy, material=Material-1
,
*End Part
**
**
** ASSEMBLY
**
*Assembly, name=Assembly
**
*Instance, name=Part-1-1, part=Part-1
*End Instance
**
*End Assembly
*Amplitude, name=Amp-1, definition=PERIODIC
1,              1.,              0.,           1000.
             1.,              1.
**
** MATERIALS
**
*Material, name=Material-1
*density
2.718e-10
*Depvar
     12,
*User Material, constants=2
2.718e-10, 0.25
** ----------------------------------------------------------------
**
** STEP: Step-1
**
*Step, name=Step-1, nlgeom=NO
*Dynamic,direct
0.01,1.,
**
** BOUNDARY CONDITIONS
**
** Name: FIXED Type: Displacement/Rotation
*Boundary
Part-1-1.FIXED, 1, 1
Part-1-1.FIXED, 2, 2
Part-1-1.FIXED, 3, 3
**
** LOADS
**
** Name: FORCE   Type: Concentrated force
*Cload, amplitude=Amp-1
Part-1-1.FORCE, 2, 1000.
**
** OUTPUT REQUESTS
**
*Restart, write, frequency=0
**
** FIELD OUTPUT: F-Output-1
**
*Output, field, frequency=1
*Node Output
CF, RF, U
*Element Output, directions=YES
LE, PE, PEEQ, PEMAG, S, SDV
*Contact Output
CDISP, CSTRESS
**
** HISTORY OUTPUT: H-Output-1
**
*Output, history, variable=PRESELECT, frequency=1
*End Step
