*Heading
** Job name: Job-1 Model name: Model-1
** Generated by: Abaqus/CAE 2020
*Preprint, echo=NO, model=NO, history=NO, contact=NO
**
** PARTS
**
*Part, name=Part-1
*Node
      1,          10.,          10.,         100.
      2,          10.,           8.,         100.
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*Element, type=C3D8
  1, 127, 128, 134, 133,   1,   2,   8,   7
  2, 128, 129, 135, 134,   2,   3,   9,   8
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*Nset, nset=Set-1, generate
   1,  756,    1
*Elset, elset=Set-1, generate
   1,  500,    1
*Nset, nset=fixed
 121, 122, 123, 124, 125, 126
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*Nset, nset=forced
   1,   2,   3,   4,   5,   6
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** Section: Section-1
*Solid Section, elset=Set-1, material=Material-1
,
*End Part
**
**
** ASSEMBLY
**
*Assembly, name=Assembly
**
*Instance, name=Part-1-1, part=Part-1
*End Instance
**
*End Assembly
*Amplitude, name=Amp-1, definition=PERIODIC
1,              1.,              0.,              0.
             1.,              1.
**
** MATERIALS
**
*Material, name=Material-1
*Density
2000.,
*Elastic
 1e+10, 0.25
** ----------------------------------------------------------------
**
** STEP: Step-1
**
*Step, name=Step-1, nlgeom=NO, inc=10000
*Dynamic,direct
0.01,10.,
**
** BOUNDARY CONDITIONS
**
** Name: BC-1 Type: Displacement/Rotation
*Boundary
Part-1-1.fixed, 1, 1
Part-1-1.fixed, 2, 2
Part-1-1.fixed, 3, 3
**
** LOADS
**
** Name: Load-1   Type: Concentrated force
*Cload, amplitude=Amp-1
Part-1-1.forced, 2, -1e+06
**
** OUTPUT REQUESTS
**
*Restart, write, frequency=0
**
** FIELD OUTPUT: F-Output-1
**
*Output, field, variable=PRESELECT
**
** HISTORY OUTPUT: H-Output-4
**
*Output, history, variable=PRESELECT
*End Step
