*Heading
** Job name: Job-1 Model name: Model-1
** Generated by: Abaqus/CAE 2017
*Preprint, echo=NO, model=NO, history=NO, contact=NO
**
** PARTS
**
*Part, name=Part-2
*Node
      1,           0.,         113.,          20.
      2,   0.74000001,         113.,          20.
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*Element, type=C3D8
   1,  127,  128,  149,  148,    1,    2,   23,   22
   2,  128,  129,  150,  149,    2,    3,   24,   23
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*Nset, nset=Set-36, generate
 3151,  6426,     1
*Elset, elset=Set-36, generate
 2501,  5000,     1
*Nset, nset=Set-37
  3362,  3363,  3364,  3365,  3366,  3368
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*Elset, elset=Set-37, generate
  5001,  17950,      1
*Nset, nset=Set-38, generate
    1,  6426,     1
*Elset, elset=Set-38, generate
    1,  5000,     1
*Nset, nset=Set-39, generate
     1,  22500,      1
*Elset, elset=Set-39, generate
     1,  17950,      1
*Nset, nset=Set-40
  3362,  3363,  3364,  3365,  3366,  3368
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*Elset, elset=Set-40, generate
  5001,  17950,      1
*Nset, nset=Set-1
  6435,  6450,  6458,  6464,  6470,  6631
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** Region: (DAM:Set-39)
*Elset, elset=_I1, internal, generate
    1,  5000,     1
** Section: DAM
*Solid Section, elset=_I1, material=DAM
,
** Section: rock
*Solid Section, elset=Set-40, material=rock
,
*End Part
**
**
** ASSEMBLY
**
*Assembly, name=Assembly
**
*Instance, name=Part-2-1, part=Part-2
*End Instance
**
*End Assembly
**
** MATERIALS
**
*Material, name=DAM
*Density
2400.,
*Elastic
 2.5e+10, 0.167
*Material, name=rock
*Density
2700.,
*Elastic
 1.5e+10, 0.24
** ----------------------------------------------------------------
**
** STEP: Step-1
**
*Step, name=Step-1, nlgeom=NO, perturbation
*Frequency, eigensolver=Lanczos, sim=NO, acoustic coupling=on, normalization=displacement
100, , , , ,
**
** BOUNDARY CONDITIONS
**
** Name: BC-1 Type: Displacement/Rotation
*Boundary
Part-2-1.Set-1, 1, 1
Part-2-1.Set-1, 2, 2
Part-2-1.Set-1, 3, 3
**
** OUTPUT REQUESTS
**
*Restart, write, frequency=0
**
** FIELD OUTPUT: F-Output-1
**
*Output, field, variable=PRESELECT
*End Step
